*HEADING
ABAQUS-style file created by OOF2 on 2016-12-07 10:04:04.661983 from a mesh of the microstructure 10U3Si2-UN-02.tif.
 ** Materials defined by OOF2:
**   UN_Color:
**     name: Color:blue
**     color: RGBColor(red=0.00000,green=0.00000,blue=1.00000)
**   U3Si2_Color:
**     name: Color:red
**     color: RGBColor(red=1.00000,green=0.00000,blue=0.00000)
** Master elements used in OOF2:
**   2: D2_2, Isoparametric 2-noded edge element
**   3: T3_3, Isoparametric 3 noded triangle with linear interpolation for both fields and positions.
**   4: Q4_4, Isoparametric 4 noded quadrilateral with bilinear interpolation for both positions and fields
** Boundary Conditions:
** Notes:
**   The set of nodes and elements may be different from the set
**    created from a skeleton depending on the element type and if the
**    mesh was refined.
** The materials and boundary conditions provided by OOF2 may be
**   translated into ABAQUS by the user.
** The element type provided below should be verified and modified
**   accordingly.
** Only elements (and nodes of such elements) that have an associated
**   material are included in this file.
*NODE
953, 290.7, 658.566666667
1029, 96.9, 715.833333333
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** The OOF2 element type is Q4_4. The type provided for ABAQUS is only a guess
** and may have to be modified by the user to be meaningful.
*ELEMENT, TYPE=CPS4
1, 1, 2, 3, 4
2, 2, 5, 6, 3
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** Point boundaries in OOF2
*NSET, NSET=topleft
1232
*NSET, NSET=bottomleft
1
*NSET, NSET=topright
1271
*NSET, NSET=bottomright
81
** Edge boundaries in OOF2
*NSET, NSET=top
1271, 1270, 1269, 1268, 1267, 1266
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*NSET, NSET=bottom
1, 2, 5, 7, 9, 11
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*ELSET, ELSET=UN_Color
1, 2, 3, 4, 6, 7
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*SOLID SECTION, ELSET=UN_Color, MATERIAL=UN_Color
*ELSET, ELSET=U3Si2_Color
5, 22, 23, 27, 45, 62
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*SOLID SECTION, ELSET=U3Si2_Color, MATERIAL=U3Si2_Color
*MATERIAL, NAME=UN_Color
** Use the information in the header to complete these fields under MATERIAL
*MATERIAL, NAME=U3Si2_Color
** Use the information in the header to complete these fields under MATERIAL
