*HEADING
ABAQUS-style file created by OOF2 on 2016-07-13 11:54:29.345274 from a mesh of the microstructure 15U3Si5_1umgrit_500x_2 copy.tif.
 ** Materials defined by OOF2:
**   UN:
**   U3Si5:
** Master elements used in OOF2:
**   2: D2_2, Isoparametric 2-noded edge element
**   3: T3_3, Isoparametric 3 noded triangle with linear interpolation for both fields and positions.
**   4: Q4_4, Isoparametric 4 noded quadrilateral with bilinear interpolation for both positions and fields
** Boundary Conditions:
**   bc<2>: DirichletBC(field=Temperature,field_component='',equation=Heat_Eqn,eqn_component='',profile=ConstantProfile(value=100),boundary='right')
**   bc: DirichletBC(field=Temperature,field_component='',equation=Heat_Eqn,eqn_component='',profile=ConstantProfile(value=100),boundary='left')
** Notes:
**   The set of nodes and elements may be different from the set
**    created from a skeleton depending on the element type and if the
**    mesh was refined.
** The materials and boundary conditions provided by OOF2 may be
**   translated into ABAQUS by the user.
** The element type provided below should be verified and modified
**   accordingly.
** Only elements (and nodes of such elements) that have an associated
**   material are included in this file.
*NODE
1, 0.0, 0.0
2, 66.1054669525, 0.0
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** The OOF2 element type is T3_3. The type provided for ABAQUS is only a guess
** and may have to be modified by the user to be meaningful.
*ELEMENT, TYPE=CPS3
5632, 13018, 13019, 13020
5634, 13025, 8266, 8268
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** The OOF2 element type is Q4_4. The type provided for ABAQUS is only a guess
** and may have to be modified by the user to be meaningful.
*ELEMENT, TYPE=CPS4
1, 1, 2, 3, 4
2, 2, 5, 6, 3
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** Point boundaries in OOF2
*NSET, NSET=topleft
12596
*NSET, NSET=bottomleft
1
*NSET, NSET=topright
28763
*NSET, NSET=bottomright
532
** Edge boundaries in OOF2
*NSET, NSET=top
28763, 13017, 13015, 13012, 13013, 16644
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*NSET, NSET=right
532, 533, 557, 558, 23390, 23431
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*ELSET, ELSET=UN
1, 2, 3, 10, 11, 12
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*SOLID SECTION, ELSET=UN, MATERIAL=UN
*ELSET, ELSET=U3Si5
4, 5, 6, 7, 8, 9
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*SOLID SECTION, ELSET=U3Si5, MATERIAL=U3Si5
*MATERIAL, NAME=UN
** Use the information in the header to complete these fields under MATERIAL
*MATERIAL, NAME=U3Si5
** Use the information in the header to complete these fields under MATERIAL
