*HEADING
ABAQUS-style file created by OOF2 on 2016-10-12 13:29:45.812584 from a mesh of the microstructure 10U3Si2-UN-01_color.tif.
 ** Materials defined by OOF2:
**   UN_thermal:
**   U3Si5_thermal:
** Master elements used in OOF2:
**   2: D2_2, Isoparametric 2-noded edge element
**   3: T3_3, Isoparametric 3 noded triangle with linear interpolation for both fields and positions.
**   4: Q4_4, Isoparametric 4 noded quadrilateral with bilinear interpolation for both positions and fields
** Boundary Conditions:
** Notes:
**   The set of nodes and elements may be different from the set
**    created from a skeleton depending on the element type and if the
**    mesh was refined.
** The materials and boundary conditions provided by OOF2 may be
**   translated into ABAQUS by the user.
** The element type provided below should be verified and modified
**   accordingly.
** Only elements (and nodes of such elements) that have an associated
**   material are included in this file.
*NODE
25, 37.6833333333, 0.0
176, 259.099643645, 0.0
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** The OOF2 element type is T3_3. The type provided for ABAQUS is only a guess
** and may have to be modified by the user to be meaningful.
*ELEMENT, TYPE=CPS3
19438, 19541, 19540, 33706
19440, 9538, 9537, 33709
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** The OOF2 element type is Q4_4. The type provided for ABAQUS is only a guess
** and may have to be modified by the user to be meaningful.
*ELEMENT, TYPE=CPS4
1, 1, 2, 3, 4
2, 4, 3, 5, 6
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** Point boundaries in OOF2
*NSET, NSET=topleft
32649
*NSET, NSET=bottomleft
40932
*NSET, NSET=topright
33705
*NSET, NSET=bottomright
858
** Edge boundaries in OOF2
*NSET, NSET=top
33705, 43703, 43702, 44998, 33699, 33700
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*NSET, NSET=right
858, 859, 1735, 2854, 3699, 3712
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*ELSET, ELSET=UN_thermal
1, 2, 3, 4, 5, 6
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*SOLID SECTION, ELSET=UN_thermal, MATERIAL=UN_thermal
*ELSET, ELSET=U3Si5_thermal
22, 24, 25, 26, 27, 28
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*SOLID SECTION, ELSET=U3Si5_thermal, MATERIAL=U3Si5_thermal
*MATERIAL, NAME=UN_thermal
** Use the information in the header to complete these fields under MATERIAL
*MATERIAL, NAME=U3Si5_thermal
** Use the information in the header to complete these fields under MATERIAL
