*HEADING
ABAQUS-style file created by OOF2 on 2017-03-09 21:53:57.241326 from a mesh of the microstructure simple_interface.png.
 ** Materials defined by OOF2:
**   anode_material:
**     name: Color:blue
**     color: RGBColor(red=0.00000,green=0.00000,blue=1.00000)
**   anode_separator_interface:
**     name: Color:white
**     color: RGBColor(red=1.00000,green=1.00000,blue=1.00000)
**   cathode_separator_interface:
**     name: Color:black
**     color: RGBColor(red=0.00000,green=0.00000,blue=0.00000)
**   cathode_material:
**     name: Color:red
**     color: RGBColor(red=1.00000,green=0.00000,blue=0.00000)
**   separator_material:
**     name: Color:green
**     color: RGBColor(red=0.00000,green=1.00000,blue=0.00000)
** Master elements used in OOF2:
**   2: D2_2, Isoparametric 2-noded edge element
**   3: T3_3, Isoparametric 3 noded triangle with linear interpolation for both fields and positions.
**   4: Q4_4, Isoparametric 4 noded quadrilateral with bilinear interpolation for both positions and fields
** Boundary Conditions:
** Notes:
**   The set of nodes and elements may be different from the set
**    created from a skeleton depending on the element type and if the
**    mesh was refined.
** The materials and boundary conditions provided by OOF2 may be
**   translated into ABAQUS by the user.
** The element type provided below should be verified and modified
**   accordingly.
** Only elements (and nodes of such elements) that have an associated
**   material are included in this file.
*NODE
5064, 37.5556965095, 309.239279705
4854, 465.151185185, 306.490765432
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** The OOF2 element type is T3_3. The type provided for ABAQUS is only a guess
** and may have to be modified by the user to be meaningful.
*ELEMENT, TYPE=CPS3
1, 1, 2, 3
2, 4, 5, 6
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** Point boundaries in OOF2
*NSET, NSET=topleft
3255
*NSET, NSET=bottomleft
3
*NSET, NSET=topright
3257
*NSET, NSET=bottomright
6
** Edge boundaries in OOF2
*NSET, NSET=top
3257, 3256, 3303, 4761, 3632, 3416
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*NSET, NSET=right
6, 4, 8, 12, 16, 18
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*ELSET, ELSET=anode_material
1, 2, 3, 4, 5, 6
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*SOLID SECTION, ELSET=anode_material, MATERIAL=anode_material
*ELSET, ELSET=anode_separator_interface
75, 76, 78, 79, 80, 81
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*SOLID SECTION, ELSET=anode_separator_interface, MATERIAL=anode_separator_interface
*ELSET, ELSET=cathode_separator_interface
1015, 1016, 1017, 1018, 1021, 1068
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*SOLID SECTION, ELSET=cathode_separator_interface, MATERIAL=cathode_separator_interface
*ELSET, ELSET=cathode_material
1020, 1022, 1023, 1025, 1026, 1027
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*SOLID SECTION, ELSET=cathode_material, MATERIAL=cathode_material
*ELSET, ELSET=separator_material
69, 70, 71, 72, 73, 74
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*SOLID SECTION, ELSET=separator_material, MATERIAL=separator_material
*MATERIAL, NAME=anode_material
** Use the information in the header to complete these fields under MATERIAL
*MATERIAL, NAME=anode_separator_interface
** Use the information in the header to complete these fields under MATERIAL
*MATERIAL, NAME=cathode_separator_interface
** Use the information in the header to complete these fields under MATERIAL
*MATERIAL, NAME=cathode_material
** Use the information in the header to complete these fields under MATERIAL
*MATERIAL, NAME=separator_material
** Use the information in the header to complete these fields under MATERIAL
