*HEADING
ABAQUS-style file created by OOF2 on 2017-02-16 12:53:30.727742 from a mesh of the microstructure simple_interface.png.
 ** Materials defined by OOF2:
**   bottom_material:
**   top_material:
**   interface_material:
** Master elements used in OOF2:
**   2: D2_2, Isoparametric 2-noded edge element
**   3: T3_3, Isoparametric 3 noded triangle with linear interpolation for both fields and positions.
**   4: Q4_4, Isoparametric 4 noded quadrilateral with bilinear interpolation for both positions and fields
** Boundary Conditions:
** Notes:
**   The set of nodes and elements may be different from the set
**    created from a skeleton depending on the element type and if the
**    mesh was refined.
** The materials and boundary conditions provided by OOF2 may be
**   translated into ABAQUS by the user.
** The element type provided below should be verified and modified
**   accordingly.
** Only elements (and nodes of such elements) that have an associated
**   material are included in this file.
*NODE
1774, 135.740740741, 260.0
403, 110.185185185, 260.0
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** The OOF2 element type is T3_3. The type provided for ABAQUS is only a guess
** and may have to be modified by the user to be meaningful.
*ELEMENT, TYPE=CPS3
1, 1, 2, 3
2, 4, 5, 6
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** Point boundaries in OOF2
*NSET, NSET=topleft
1689
*NSET, NSET=bottomleft
3
*NSET, NSET=topright
1691
*NSET, NSET=bottomright
6
** Edge boundaries in OOF2
*NSET, NSET=top
1691, 1690, 1877, 2479, 2108, 2472
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*NSET, NSET=right
6, 4, 10, 11, 13, 20
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*ELSET, ELSET=bottom_material
1, 2, 3, 4, 5, 6
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*SOLID SECTION, ELSET=bottom_material, MATERIAL=bottom_material
*ELSET, ELSET=top_material
45, 46, 48, 50, 51, 52
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*SOLID SECTION, ELSET=top_material, MATERIAL=top_material
*ELSET, ELSET=interface_material
44, 47, 49, 54, 55, 59
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*SOLID SECTION, ELSET=interface_material, MATERIAL=interface_material
*MATERIAL, NAME=bottom_material
** Use the information in the header to complete these fields under MATERIAL
*MATERIAL, NAME=top_material
** Use the information in the header to complete these fields under MATERIAL
*MATERIAL, NAME=interface_material
** Use the information in the header to complete these fields under MATERIAL
